*HEADING
Abaqus job automatically generated by the cohesive element generator
Reference: VP Nguyen, An open source program to generate zero-thickness cohesive interface elements,
Advances in Engineering Software, 2014.
Only nodes, bulk and cohesive elements are written correctly.
Users have to make proper changes to some parameters: element types, boundary conditions etc.
*NODE
1, 0, 0
2, 100, 0
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*ELEMENT, TYPE=CPS4, ELSET=DD
6, 1, 406, 7, 2815, 2416, 2816, 1608, 1610
7, 1608, 2816, 2416, 2817, 1207, 1607, 4, 1609
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*USER ELEMENT, TYPE=U1, NODE=4, COORDINATES=2, PROPERTIES=9, VARIABLES=4
1,2
*ELEMENT, TYPE=U1, ELSET=COH
0, 1, 406, 7, 5610, 6011, 5612
1, 7, 407, 8, 5612, 6012, 5613
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*ELSET, ELSET=888
6,7,8,9,10,11
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*ELSET, ELSET=999
806,807,808,809,810,811
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*NSET, NSET=333
2,3,806,807,808
*NSET, NSET=444
2,6,1611,1612,1613
*NSET, NSET=dd
4
*NSET, NSET=dd
5
*UEL PROPERTY, ELSET=COH
100, 200, 300
*BOUNDARY
*MATERIAL
