*Heading
** Job name: Job-1 Model name: Model-1
** Generated by: Abaqus/CAE 6.14-1
*Preprint, echo=NO, model=NO, history=NO, contact=NO
**
** PARTS
**
*Part, name=Total
*Node
      1,           0.,           0.
      2,           1.,           0.
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*Element, type=CPS4R
 1, 51, 87, 68, 89
 2, 66, 18, 19, 65
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*Nset, nset=matrix, generate
  1,  98,   1
*Elset, elset=matrix, generate
  1,  73,   1
*Nset, nset=fiber
   5,  42,  43,  44,  45,  46,  47,  48,  49,  50,  99, 100, 101, 102, 103, 104
*Elset, elset=fiber, generate
 74,  83,   1
** Section: Section-1
*Solid Section, elset=matrix, material=Material-1
,
** Section: Section-2
*Solid Section, elset=fiber, material=Material-2
,
*End Part
**
**
** ASSEMBLY
**
*Assembly, name=Assembly
**
*Instance, name=Total-1, part=Total
*End Instance
**
*Nset, nset=leftNodes, instance=Total-1
  1,  4, 33, 34, 35, 36, 37, 38, 39, 40, 41
*Elset, elset=leftNodes, instance=Total-1
  7,  8, 13, 32, 33, 39, 41, 42, 44, 50
*Elset, elset=_Surf-1_S2, internal, instance=Total-1
  2, 17, 47
*Elset, elset=_Surf-1_S1, internal, instance=Total-1
 23, 25
*Elset, elset=_Surf-1_S4, internal, instance=Total-1
 26, 27, 30, 31, 56
*Surface, type=ELEMENT, name=Surf-1
_Surf-1_S2, S2
_Surf-1_S1, S1
_Surf-1_S4, S4
*End Assembly
**
** MATERIALS
**
*Material, name=Material-1
*Elastic
1., 0.3
*Material, name=Material-2
*Elastic
1., 0.3
**
** BOUNDARY CONDITIONS
**
** Name: BC-1 Type: Displacement/Rotation
*Boundary
leftNodes, 1, 1
leftNodes, 2, 2
leftNodes, 6, 6
** ----------------------------------------------------------------
**
** STEP: Step-1
**
*Step, name=Step-1, nlgeom=NO
*Static
1., 1., 1e-05, 1.
**
** LOADS
**
** Name: Load-1   Type: Pressure
*Dsload
Surf-1, P, -10.
**
** OUTPUT REQUESTS
**
*Restart, write, frequency=0
**
** FIELD OUTPUT: F-Output-1
**
*Output, field, variable=PRESELECT
**
** HISTORY OUTPUT: H-Output-1
**
*Output, history, variable=PRESELECT
*End Step
